Simulations: Version=56
  Replacements
    Plant Sorghum: CropType=Sorghum; IsEnding=false; DaysAfterEnding=0
      Memo TitlePage
        The APSIM Sorghum Model

        McLean, G., Brider, J., Doherty, A.

        The APSIM sorghum model has been developed using the Plant Modelling Framework (PMF) of Brown et al(2014).
        This new framework provides a library of plant organ and process submodels that can be coupled, at runtime, to construct a model in much the same way that models can be coupled to construct a simulation. This means that dynamic composition of lower level process and organ classes (e.g. photosynthesis, leaf) into larger constructions (e.g. sorghum, wheat, sorghum) can be achieved by the model developer without additional coding.
      SorghumArbitrator Arbitrator: WatSupply=0; NMassFlowSupply=0; NDiffusionSupply=0
        SorghumArbitratorN NArbitrator
        PrioritythenRelativeAllocation DMArbitrator
      Phenology
        Memo
          The phenology model used in the APSIM sorghum model follows the approach used in earlier sorghum models(Jones and Kiniry (1986), Carberry and Arbrecht (1991), Carberry et al (1989).
          The model predicts development of primordia on the apex of the main stem and appearance of individual leaves to predict time to flag leaf.  Other stages use thermal time targets.
        MultiplyFunction ThermalTime
          PhaseLookup TT
            PhaseLookupValue TT: Start=Germination; End=Flowering
              AirTemperatureFunction ThermalTime
                XYPairs: X=[11, 30, 42]; Y=[0, 19, 0]
            PhaseLookupValue TTFM: Start=Flowering; End=HarvestRipe
              WeightedTemperatureFunction: MaximumTemperatureWeighting=0.5
                XYPairs: X=[5.7, 23.5]; Y=[0, 17.8]
        GerminatingPhase Germinating: Start=Sowing; End=Germination
        EmergingPhase Emerging: ShootLag=15; ShootRate=0.6; Start=Germination; End=Emergence; TTForTimeStep=0
          VariableReference ThermalTime: VariableName=[Phenology].ThermalTime.Value()
        GenericPhase Juvenile: Start=Emergence; End=EndJuvenile
          Constant Target: FixedValue=100
          VariableReference Progression: VariableName=[Phenology].ThermalTime.Value()
        GenericPhase JuvenileToFloralInit: Start=EndJuvenile; End=FloralInitiation
          VariableReference Progression: VariableName=[Phenology].ThermalTime.Value()
          VariableReference Target: VariableName=[Phenology].TTTargetPhotoSensitive.Value()
        GenericPhase FloralInitToFlagLeaf: Start=FloralInitiation; End=FlagLeaf
          VariableReference Progression: VariableName=[Phenology].ThermalTime.Value()
          SubtractFunction Target
            VariableReference TTEmergToFlag: VariableName=[Phenology].TTEmergToFlagLeaf.Value()
            VariableReference TTJuvenile: VariableName=[Phenology].Juvenile.Target.Value()
            VariableReference TTJuvToFloralInit: VariableName=[Phenology].JuvenileToFloralInit.Target.Value()
        GenericPhase FlagLeafToFlowering: Start=FlagLeaf; End=Flowering
          Constant Target: FixedValue=170
          VariableReference Progression: VariableName=[Phenology].ThermalTime.Value()
        GenericPhase FloweringToGrainFilling: Start=Flowering; End=StartGrainFill
          Constant Target: FixedValue=80
          VariableReference Progression: VariableName=[Phenology].ThermalTime.Value()
        GenericPhase GrainFilling: Start=StartGrainFill; End=EndGrainFill
          VariableReference Progression: VariableName=[Phenology].ThermalTime.Value()
          SubtractFunction Target
            VariableReference FlowerToMaturity: VariableName=[Phenology].TTFIowerToMaturity.Value()
            VariableReference FlowerToGrainFill: VariableName=[Phenology].FloweringToGrainFilling.Target.Value()
            VariableReference GrainFillToMaturity: VariableName=[Phenology].TTGrainFillToMaturity.Value()
          VariableReference Progression1: VariableName=[Phenology].ThermalTime.Value()
        GenericPhase Maturing: Start=EndGrainFill; End=Maturity
          VariableReference Progression: VariableName=[Phenology].ThermalTime.Value()
          VariableReference Target: VariableName=[Phenology].TTGrainFillToMaturity.Value()
        GenericPhase MaturityToHarvestRipe: Start=Maturity; End=HarvestRipe
          VariableReference Progression: VariableName=[Phenology].ThermalTime.Value()
          Constant Target: FixedValue=1
        EndPhase ReadyForHarvesting: Start=HarvestRipe; End=Unused
          VariableReference ThermalTime: VariableName=[Phenology].ThermalTime.Value()
        PhotoperiodFunction Photoperiod: Twilight=-6; DayLength=0
        OnEventFunction FloweringDAS: SetEvent=Flowering; ReSetEvent=never
          Memo
            A function is used to provide flowering date as days after sowing(DAS).
          Constant PreEventValue: FixedValue=0
          VariableReference PostEventValue: VariableName=[Phenology].DaysAfterSowing
        OnEventFunction MaturityDAS: SetEvent=Maturity; ReSetEvent=never
          Memo
            A function is used to provide maturity date as days after sowing(DAS).
          Constant PreEventValue: FixedValue=0
          VariableReference PostEventValue: VariableName=[Phenology].DaysAfterSowing
        Constant TTFIowerToMaturity: FixedValue=761
        Constant TTEndJuvToInit: FixedValue=160
        MultiplyFunction TTGrainFillToMaturity
          VariableReference FlowerToMaturity: VariableName=[Phenology].TTFIowerToMaturity.Value()
          Constant Proportion: FixedValue=0.05
        PhaseLookup TTTargetPhotoSensitive
          PhaseLookupValue: Start=Sowing; End=Emergence
            VariableReference PreEventValue: VariableName=[Phenology].TTEndJuvToInit.Value()
          PhaseLookupValue EmergenceToEndJuve: Start=Emergence; End=EndJuvenile
            AddFunction Add
              LinearInterpolationFunction PhotoModifier: XProperty=[Phenology].Photoperiod.Value()
                XYPairs: X=[11.5, 13.5]; Y=[0, 23]
              VariableReference TTEndJuvToInit: VariableName=[Phenology].TTEndJuvToInit.Value()
          PhaseLookupValue EndJuveToMaturity: Start=EndJuvenile; End=HarvestRipe
            OnEventFunction TTTargetPhoto: SetEvent=EndJuvenile; ReSetEvent=never
              VariableReference PreEventValue: VariableName=[Phenology].TTEndJuvToInit.Value()
              AddFunction PostEventValue: same as Replacements.Sorghum.Phenology.TTTargetPhotoSensitive.EmergenceToEndJuve.Add
        OnEventFunction TTTargetPhotoSensitivess: same as Replacements.Sorghum.Phenology.TTTargetPhotoSensitive.EndJuveToMaturity.TTTargetPhoto
        Constant FinalLeafNo: FixedValue=17.101
        Constant LeafNoAtEmergence: FixedValue=1
        Constant LeafNoRateChange: FixedValue=3.5
        AddFunction TTEmergToFlagLeaf
          MultiplyFunction LeafAppearingPhase1
            SubtractFunction NoLeavesRate1
              VariableReference FinalLeafNo: VariableName=[Phenology].FinalLeafNo.Value()
              VariableReference LeafNoAtEmergence: VariableName=[Phenology].LeafNoAtEmergence.Value()
              VariableReference LeafNoRateChange: VariableName=[Phenology].LeafNoRateChange.Value()
            Constant LeafAppearanceRate1: FixedValue=41
          MultiplyFunction LeafAppearingPhase2
            Constant LeafAppearanceRate2: FixedValue=20
            VariableReference LeafNoRateChange: VariableName=[Phenology].LeafNoRateChange.Value()
        AccumulateFunction TTFromEmergence: StartStageName=Emergence; EndStageName=Maturity; FractionRemovedOnCut=0; FractionRemovedOnHarvest=0; FractionRemovedOnGraze=0; FractionRemovedOnPrune=0
          VariableReference ThermalTime: VariableName=[Phenology].ThermalTime.Value()
        AccumulateFunction TTFMFromFlowering: StartStageName=Flowering; EndStageName=Maturity; FractionRemovedOnCut=0; FractionRemovedOnHarvest=0; FractionRemovedOnGraze=0; FractionRemovedOnPrune=0
          VariableReference ThermalTime: VariableName=[Phenology].ThermalTime.Value()
        AddFunction TTEmergToFloralInit
          VariableReference TTTargetJuvenille: VariableName=[Phenology].Juvenile.Target.Value()
          VariableReference TTTargetJuvToFI: VariableName=[Phenology].JuvenileToFloralInit.Target.Value()
        Constant SorghumFlag: FixedValue=1
      CulmStructure Structure: FinalLeafNo=0; FertileTillerNumber=0; CurrentLeafNo=0; LeafInitialisationStage=Emergence
        Memo
          Though tillering is common in some sorghum varieties under certain agronomic conditions, no tillering is accounted for within this model.  Therefore all branching has been parameterised out of the current sorghum model.
        VariableReference ThermalTime: VariableName=[Phenology].ThermalTime.Value()
        LessThanFunction Phyllochron
          VariableReference CurrentLeafNum: VariableName=[Structure].CurrentLeafNo
          SubtractFunction
            VariableReference FinalLeafNum: VariableName=[Structure].FinalLeafNumber.Value()
            Constant LeafNumRateChange: FixedValue=3.5
          Constant LeafAppRate1: FixedValue=41
          Constant LeafAppRate2: FixedValue=20
        HoldFunction FinalLeafNumber: WhenToHold=FloralInitiation
          AddFunction ValueToHold
            VariableReference LeafNumSeed: VariableName=[Structure].LeafNumSeed.Value()
            DivideFunction
              VariableReference TTEmergToFI: VariableName=[Phenology].TTEmergToFloralInit.Value()
              VariableReference LeafInitRate: VariableName=[Structure].LeafInitiationRate.Value()
        HeightFunction HeightModel
          LinearInterpolationFunction PotentialHeight: XProperty=[Phenology].Stage
            XYPairs: X=[3, 4, 5, 6]; Y=[20, 50, 60, 1700]
        Constant LeafNumSeed: FixedValue=4
        Constant LeafInitiationRate: FixedValue=21.6
        Constant LeafNumAtEmergence: FixedValue=1
        Constant VerticalAdjustment: FixedValue=0
      ReproductiveOrgan Grain: GrowthRespiration=0; MaintenanceRespiration=0
        Biomass Live: DMDOfStructural=0.6
        Biomass Dead: DMDOfStructural=0.6
        Constant InitialGrainProportion: FixedValue=0.05
        Constant MaximumPotentialGrainSize: FixedValue=0.3
        Constant MinimumNConc: FixedValue=0.008
        PhaseLookup MaximumNConc
          PhaseLookupValue InitialPhase: Start=Flowering; End=StartGrainFill
            Constant InitialNconc: FixedValue=0.05
          PhaseLookupValue LinearPhase: Start=StartGrainFill; End=EndGrainFill
            Constant FinalNconc: FixedValue=0.0175
        Constant WaterContent: FixedValue=0.13
        PhaseLookup NFillingRate
          PhaseLookupValue GrainFilling: Start=StartGrainFill; End=EndGrainFill
            LessThanFunction
              DivideFunction
                VariableReference TTGrainFillToMaturity: VariableName=[Phenology].TTGrainFillToMaturity
                VariableReference TTStartGrainToNow: VariableName=[Grain].TTStartGrainToNow
              Constant GrainFillFraction: FixedValue=0.5; Units=g/g
              MultiplyFunction
                VariableReference NumberFunction: VariableName=[Grain].NumberFunction.Value()
                VariableReference ThermalTime: VariableName=[Phenology].ThermalTime.Value()
                DivideFunction
                  Constant GrainFillRate: FixedValue=0.001
                  Constant Thousand: FixedValue=1000
              MultiplyFunction MultiplyFunction1
                VariableReference dltDmGreen: VariableName=[Grain].potentialDMAllocation.Structural
                VariableReference maxNConc: VariableName=[Grain].MaximumNConc
        MultiplyFunction NumberFunction
          MinimumFunction
            VariableReference FinalGrainNum: VariableName=[Grain].FinalGrainNum.Value()
            MultiplyFunction
              VariableReference FinalGrainNum: VariableName=[Grain].FinalGrainNum.Value()
              DivideFunction
                VariableReference TTStartGrainToNow: VariableName=[Grain].TTStartGrainToNow.Value()
                Constant RampTT: FixedValue=100
          Constant TemperatureFactor: FixedValue=1
        OnEventFunction FinalGrainNum: SetEvent=StartGrainFill
          Constant PreEventValue: FixedValue=0
          DivideFunction PostEventValue
            DivideFunction GrowthRate
              SubtractFunction PlantGrowth
                VariableReference TotalBiomass: VariableName=[Sorghum].Total.Wt
                VariableReference GreenWtAtFI: VariableName=[Grain].GreenWtAtFI.Value()
              AddFunction
                VariableReference DaysFIToStartGF: VariableName=[Grain].DaysFIToStartGrainFill.Value()
                Constant 1DayOffset: FixedValue=0
            Constant DMPerSeed: FixedValue=0.00083
        AccumulateFunction DaysFIToStartGrainFill: StartStageName=FloralInitiation; EndStageName=StartGrainFill; FractionRemovedOnCut=0; FractionRemovedOnHarvest=0; FractionRemovedOnGraze=0; FractionRemovedOnPrune=0
          Constant One: FixedValue=1
        OnEventFunction GreenWtAtFI: SetEvent=StartGrainFill
          Constant PreEventValue: FixedValue=0
          VariableReference PostEventValue: VariableName=[Sorghum].Total.Wt
        AccumulateFunction TTStartGrainToNow: StartStageName=StartGrainFill; EndStageName=Maturity; FractionRemovedOnCut=0; FractionRemovedOnHarvest=0; FractionRemovedOnGraze=0; FractionRemovedOnPrune=0
          VariableReference ThermalTime: VariableName=[Phenology].ThermalTime.Value()
        DivideFunction DMCaryopsis
          VariableReference DMFixationSupply: VariableName=[Arbitrator].DM.TotalFixationSupply
          VariableReference GrainNumber: VariableName=[Grain].NumberFunction.Value()
          VariableReference ThermalTime: VariableName=[Phenology].ThermalTime.Value()
        MinimumFunction PotGrainFillRate
          MultiplyFunction
            AddFunction
              MultiplyFunction
                VariableReference DMCaryopsis: VariableName=[Grain].DMCaryopsis.Value()
                Constant: FixedValue=0.4026
              Constant: FixedValue=3.19e-05
            Constant: FixedValue=1000
          Constant MaxGrainFillRate: FixedValue=0.09
        MultiplyFunction DMDemandFunction
          VariableReference GrainFillRate: VariableName=[Grain].PotGrainFillRate.Value()
          VariableReference ThermalTime: VariableName=[Phenology].ThermalTime.Value()
          VariableReference GrainNumber: VariableName=[Grain].NumberFunction.Value()
          Constant: FixedValue=0.001
        BiomassRemoval BiomassRemovalDefaults
          OrganBiomassRemovalType Harvest: FractionLiveToRemove=0.5; FractionDeadToRemove=0; FractionLiveToResidue=0.1; FractionDeadToResidue=0
          OrganBiomassRemovalType Cut: FractionLiveToRemove=0.8; FractionDeadToRemove=0; FractionLiveToResidue=0; FractionDeadToResidue=0
          OrganBiomassRemovalType Prune: FractionLiveToRemove=0; FractionDeadToRemove=0; FractionLiveToResidue=0.6; FractionDeadToResidue=0
          OrganBiomassRemovalType Graze: FractionLiveToRemove=0.6; FractionDeadToRemove=0; FractionLiveToResidue=0.2; FractionDeadToResidue=0
        Constant DMConversionEfficiency: FixedValue=1
        Constant RemobilisationCost: FixedValue=0
        Constant CarbonConcentration: FixedValue=0.4
      Root: GrowthRespiration=0; MaintenanceRespiration=0; RootAngle=45; SWAvailabilityRatio=0
        Constant InitialDM: FixedValue=0.1; Units=g/plant
        LinearInterpolationFunction KLModifier: XProperty=[Sorghum].Population
          Memo
            The parameter KL is is described by Meinke et al (1993) to combine elements of soil conductivity (K) with root length (L) in determining root water uptake.  Peake et al (2013) demonstrated that in sorghum KL varied with plant population through impacts on root length density.  Here we adjust KL linearly with plant population.
          XYPairs: X=[0, 10]; Y=[1, 1]
        Constant SoilWaterEffect: FixedValue=1
          Memo
            No effect of soil water content on root growth is currently captured in the model.
        Constant TemperatureEffect: FixedValue=1
          Memo
            No effect of temperature on root growth is currently captured in the model.
        Constant MaxDailyNUptake: FixedValue=20
          Memo
            Maximum daily N uptake is set to an arbitrarily high value.
        Constant SenescenceRate: FixedValue=0.002
          Memo
            Jones and Kiniry (1986) used a constant root senescence fraction in the CERES-Sorghum model.
        Constant MaximumNConc: FixedValue=0.02
        Constant MinimumNConc: FixedValue=0.002
        Constant MaximumRootDepth: FixedValue=1000000
        PhaseLookup RootFrontVelocity
          Memo
            Hammer et al (2009) used a constant extraction front velocity of 2.5cm per day in their analysis of historical sorghum yield trends in the US corn belt.
          PhaseLookupValue PreGrainFill: Start=Germination; End=StartGrainFill
            Constant Function: FixedValue=27
          PhaseLookupValue GrainfillToMaturity: Start=StartGrainFill; End=Maturity
            Constant Function: FixedValue=0
        PhaseBasedSwitch NitrogenDemandSwitch: Start=Germination; End=Maturity
        LinearInterpolationFunction KNO3: XProperty=[Root].LengthDensity
          XYPairs: X=[0, 0.003]; Y=[0.03, 0.03]
        LinearInterpolationFunction NUptakeSWFactor: XProperty=[Root].RWC
          XYPairs: X=[0, 0.2, 1]; Y=[1, 1, 1]
        LinearInterpolationFunction KNH4: XProperty=[Root].LengthDensity
          XYPairs: X=[0, 0.003]; Y=[0.03, 0.03]
        Constant SpecificRootLength: FixedValue=100000; Units=m/g
        BiomassRemoval BiomassRemovalDefaults: same as Replacements.Sorghum.Grain.BiomassRemovalDefaults
        Constant DMConversionEfficiency: FixedValue=1
        Constant MaintenanceRespirationFunction: FixedValue=1
        Constant RemobilisationCost: FixedValue=0
        Constant CarbonConcentration: FixedValue=0.4
        BiomassDemand DMDemands
          MultiplyFunction Structural
            PhaseLookup ratioRootShoot
              Memo
                This is a straight lookup table not an lineaer relationship
              PhaseLookupValue BetweenEmergenceAndFloralInit: Start=Emergence; End=FloralInitiation
                Constant rootFraction: FixedValue=1; Units=0-1
              PhaseLookupValue BetweenFloralInitAndFlowering: Start=FloralInitiation; End=Flowering
                Constant rootFraction: FixedValue=0.33; Units=0-1
              PhaseLookupValue BetweenFloweringAndGrainFill: Start=Flowering; End=StartGrainFill
                Constant rootFraction: FixedValue=0.087; Units=0-1
            VariableReference LeafSupplyFunction: VariableName=[Leaf].DMSupplyFunction
          Constant Metabolic: FixedValue=0
          Constant Storage: FixedValue=0
        BiomassDemand NDemands
          MaximumFunction Structural
            Constant zero: FixedValue=0
            SubtractFunction
              MultiplyFunction required
                VariableReference MinNconc: VariableName=[Root].minimumNconc.Value()
                AddFunction
                  VariableReference dltDmGreen: VariableName=[Root].potentialDMAllocation.Structural
                  VariableReference dmGreen: VariableName=[Root].Live.Wt
              VariableReference nGreen: VariableName=[Root].Live.N
          Constant Metabolic: FixedValue=0
          Constant Storage: FixedValue=0
        PhaseBasedSwitch NitrogenRootCalcSwitch: Start=Germination; End=Maturity
        LinearInterpolationFunction RootDepthStressFactor: XProperty=[Root].SWAvailabilityRatio
          XYPairs: X=[0, 0.25]; Y=[0, 1]
        Constant RootFrontCalcSwitch: FixedValue=1
        Constant MaxNUptakeRate: FixedValue=0.029
        Constant NSupplyFraction: FixedValue=5
        LessThanFunction DltThermalTime
          VariableReference TTPostAnthesis: VariableName=[Phenology].TTFMFromFlowering
          Constant NCeaseUptake: FixedValue=570
          VariableReference ThermalTime: VariableName=[Phenology].ThermalTime
          Constant Zero: FixedValue=0
        Constant MaxDiffusion: FixedValue=2
        PhaseLookup ratioRootShootInverse
          PhaseLookupValue BetweenEmergenceAndEndJuvenile: Start=Emergence; End=EndJuvenile
            SubtractFunction
              Constant rootFraction: FixedValue=1; Units=0-1
              DivideFunction
                Constant inverse: FixedValue=1; Units=0-1
                Constant rootFraction: FixedValue=2; Units=0-1
          PhaseLookupValue BetweenEndJuvenileAndFlagLeaf: Start=EndJuvenile; End=FlagLeaf
            SubtractFunction
              Constant rootFraction: FixedValue=1; Units=0-1
              DivideFunction
                Constant inverse: FixedValue=1; Units=0-1
                Constant rootFraction: FixedValue=1.33; Units=0-1
          Memo
            This is a straight lookup table not an lineaer relationship
          PhaseLookupValue BetweenFlagLeafAndGrainFill: Start=FlagLeaf; End=StartGrainFill
            SubtractFunction
              Constant rootFraction: FixedValue=1; Units=0-1
              DivideFunction
                Constant inverse: FixedValue=1; Units=0-1
                Constant rootFraction: FixedValue=1.087; Units=0-1
      SorghumLeaf Leaf: MicroClimatePresent=false; LeafInitialisationStage=Emergence; KDead=0.03; PhosphorusStress=1; senLightTimeConst=10; frostKill=1; senThreshold=0.25; senWaterTimeConst=10
        zero: DltLAI, dltPotentialLAI, dltStressedLAI, LAI, SLN, CoverGreen, Height, WaterDemand, BiomassRUE, BiomassTE, LAIDead, senRadnCrit, LossFromExpansionStress, SenescedLai, DltRetranslocatedN, DltSenescedN, DltSenescedLaiN, DltSenescedLai, DltSenescedLaiLight, DltSenescedLaiWater, DltSenescedLaiFrost
        Constant InitialLAIFunction: FixedValue=200
        Constant InitialSLNFunction: FixedValue=1.5
        Constant InitialWtFunction: FixedValue=0.1; Units=g/plant
        Constant LaiDeadFunction: FixedValue=0; Units=m^2/m^2
        MinimumFunction ExpansionStress
          LinearInterpolationFunction WaterStressEffect: XProperty=[Leaf].sdRatio
            XYPairs: X=[0.1, 1.1]; Y=[0, 1]
          Constant NitrogenStressEffect: FixedValue=1
          Constant PhosphorusStressEffect: FixedValue=1
        DivideFunction sdRatio
          VariableReference WSupply: VariableName=[Arbitrator].WatSupply
          VariableReference WDemand: VariableName=[Leaf].WaterDemandFunction
        MultiplyFunction ExtinctionCoefficientFunction
          LinearInterpolationFunction PotentialExtinctionCoeff: XProperty=[Sorghum].SowingData.RowSpacing
            XYPairs: X=[0.2, 0.5, 1]; Y=[0.7, 0.4, 0.4]
        RUEModel Photosynthesis
          Constant RUE: FixedValue=1.25
          WeightedTemperatureFunction FT: MaximumTemperatureWeighting=0.5
            XYPairs: X=[0, 8, 20, 35, 50]; Y=[0, 0, 1, 1, 0]
          Memo
            Replaced the RUE2CO2 function as C4 Photosynthetic pathway is not represented in old sorghum.
            Look to reimplement it once the stats are working
          Constant FCO2: FixedValue=1
          VariableReference FN: VariableName=[Leaf].NitrogenStress
          VariableReference RadnInt: VariableName=[Leaf].RadIntTot
          Constant FVPD: FixedValue=1
          Constant FW: FixedValue=1
        LinearInterpolationFunction TemperatureStressFunction: XProperty=[Weather].MeanT
          XYPairs: X=[8, 20, 35, 50]; Y=[0, 1, 1, 0]
        LinearInterpolationFunction FrostFraction: XProperty=[Weather].MinT
          XYPairs: X=[-10, -9]; Y=[1, 0]
        MinimumFunction FRGRFunction
          VariableReference RUE_FT: VariableName=[Leaf].Photosynthesis.FT.Value()
          MinimumFunction Others
            VariableReference RUE_FN: VariableName=[Leaf].Photosynthesis.FN.Value()
            VariableReference RUE_FVPD: VariableName=[Leaf].Photosynthesis.FVPD.Value()
        VariableReference ThermalTime: VariableName=[Phenology].ThermalTime.Value()
        Constant FTN: FixedValue=0.1
        Constant NConc: FixedValue=0.1
        Constant HeightFunction: FixedValue=10
        DivideFunction LeafPartitioningCoefficient
          Constant One: FixedValue=1
          AddFunction
            Constant One: FixedValue=1
            MultiplyFunction
              VariableReference PartitionRate: VariableName=[Leaf].PartitionRate.Value()
              PowerFunction: Exponent=2
                VariableReference LeafNumber: VariableName=[Structure].NLeaves
                Memo
                  LeafNumber is referring to NLeaves for copatitibility with old model.
                  Should be CurrentLeafNo?
        Constant PartitionRate: FixedValue=0.006
        SubtractFunction DMRemaining
          VariableReference DMFixationSupply: VariableName=[Leaf].DMSupplyFunction.Value()
          VariableReference LeafDMDemand: VariableName=[Leaf].DMDemands.Structural.DMDemandFunction.Value()
        Constant MinimumNConc: FixedValue=0
        Constant MaximumNConc: FixedValue=0
        Constant NReallocationFactor: FixedValue=0
        Constant SenescenceRate: FixedValue=0
        Constant DetachmentRateFunction: FixedValue=0
        TEWaterDemandFunction WaterDemandFunction
          Constant SVPFrac: FixedValue=0.75
          Constant TranspirationEfficiencyCoefficient: FixedValue=0.009
          VariableReference Photosynthesis: VariableName=[Leaf].Photosynthesis.Value()
        MultiplyFunction DMSupplyFixation
          PhaseLookup ratioRootShoot
            PhaseLookupValue BetweenEmergenceAndFloralInit: Start=Emergence; End=FloralInitiation
              Constant rootFraction: FixedValue=2; Units=0-1
            PhaseLookupValue BetweenFloralInitAndFlowering: Start=FloralInitiation; End=Flowering
              Constant rootFraction: FixedValue=1.33; Units=0-1
            Memo
              This is a straight lookup table not an lineaer relationship
            PhaseLookupValue BetweenFloweringAndGrainFill: Start=Flowering; End=StartGrainFill
              Constant rootFraction: FixedValue=1.087; Units=0-1
            PhaseLookupValue BetweenGrainFillAndHarvestRipe: Start=StartGrainFill; End=HarvestRipe
              Constant rootFraction: FixedValue=1; Units=0-1
          VariableReference DMSupplyFunction: VariableName=[Leaf].DMSupplyFunction.Value()
        MinimumFunction DMSupplyFunction
          VariableReference BiomassTE: VariableName=[Leaf].BiomassTE
          VariableReference BiomassRUE: VariableName=[Leaf].BiomassRUE
        MultiplyFunction PotentialBiomassTEFunction
          DivideFunction TE
            VariableReference TECoeff
              VariableName=[Leaf].WaterDemandFunction.TranspirationEfficiencyCoefficient.Value()
            VariableReference VPD: VariableName=[Leaf].WaterDemandFunction.VPD
            Constant g2mm: FixedValue=0.001
          VariableReference WaterSupply: VariableName=[Arbitrator].WatSupply
        Constant MaintenanceRespirationFunction: FixedValue=0; Units=0-1
        Constant DMConversionEfficiency: FixedValue=1; Units=0-1
        BiomassRemoval BiomassRemovalDefaults: same as Replacements.Sorghum.Grain.BiomassRemovalDefaults
        Constant DMReallocationFactor: FixedValue=0
        Constant DMRetranslocationFactor: FixedValue=0
        VariableReference CriticalNConc: VariableName=[Leaf].MinimumNConc.Value()
        Constant RemobilisationCost: FixedValue=0
        Constant CarbonConcentration: FixedValue=0.4
        BiomassDemand DMDemands
          MultiplyFunction Structural
            PhaseLookup DMDemandFunction
              PhaseLookupValue BetweenEmergenceAndFlag: Start=Emergence; End=FlagLeaf
                MinimumFunction
                  MultiplyFunction
                    VariableReference LeafPartitionCoeff: VariableName=[Leaf].LeafPartitioningCoefficient
                    VariableReference DMSupplyFunction: VariableName=[Leaf].DMSupplyFunction
                  DivideFunction dltDmLeafMax
                    VariableReference DltStressedLAI: VariableName=[Leaf].DltStressedLAI
                    MultiplyFunction
                      VariableReference SlaMin: VariableName=[Leaf].SlaMin
                      Constant smm2sm: FixedValue=1e-06
            Constant StructuralFraction: FixedValue=1; Units=0-1
          Constant Metabolic: FixedValue=0
          StorageDMDemandFunction Storage
            SubtractFunction StorageFraction
              Constant One: FixedValue=1
              VariableReference StructuralFraction: VariableName=[Leaf].DMDemands.Structural.StructuralFraction.Value()
        BiomassDemand NDemands
          PhaseLookup Structural
            PhaseLookupValue BetweenEmergenceAndFlower: Start=Emergence; End=Flowering
              MultiplyFunction NewLeafNDemand
                VariableReference dltLAI: VariableName=[Leaf].DltStressedLAI
                VariableReference newLeafSLN: VariableName=[Leaf].NewLeafSLN
          MaximumFunction Metabolic
            SubtractFunction
              MultiplyFunction nRequired
                SubtractFunction
                  AddFunction laiToday
                    VariableReference LAI: VariableName=[Leaf].LAI
                    VariableReference DltLAI: VariableName=[Leaf].DltLAI
                  VariableReference DltSenescedLAI: VariableName=[Leaf].DltSenescedLai
                VariableReference TargetSLN: VariableName=[Leaf].TargetSLN
              VariableReference nGreen: VariableName=[Leaf].Live.N
            Constant Zero: FixedValue=0
          Constant Storage: FixedValue=0
        Constant NitrogenDemandSwitch: FixedValue=1
        PhaseLookup DltLAIFunction
          Memo
            ```
            if(stage >= endJuv && stage < maturity)
                  dltLAI = Min(dltStressedLAI,dltDmGreen * slaMax * smm2sm);
               else dltLAI = dltStressedLAI;
            ```
          PhaseLookupValue BetweenEndJuvenileAndMaturity: Start=EndJuvenile; End=Maturity
            MinimumFunction MinFunction
              VariableReference DltStressedLAI: VariableName=[Leaf].dltStressedLAI
              MultiplyFunction LimitedSLN
                AddFunction dltDMGreen
                  VariableReference Structural: VariableName=[Leaf].DMPotentialAllocation.Structural
                  VariableReference Metabolic: VariableName=[Leaf].DMPotentialAllocation.Metabolic
                Constant slaMax: FixedValue=45000
                Constant smm2sm: FixedValue=1e-06
          PhaseLookupValue BetweenEmergenceAndEndJuvenile: Start=Emergence; End=EndJuvenile
            VariableReference DltStressedLAI: VariableName=[Leaf].dltStressedLAI
        Constant StomatalConductanceCO2Modifier: FixedValue=1
        Constant SlaMin: FixedValue=8000
        Constant NewLeafSLN: FixedValue=1
        Constant SenescedLeafSLN: FixedValue=0.3
        Constant NDilutionSlope: FixedValue=0.0043
        Constant NDilutionIntercept: FixedValue=-0.0017
        OnEventFunction TargetSLN: SetEvent=FlagLeaf
          Constant PreEventValue: FixedValue=1.5
          VariableReference PostEventValue: VariableName=[Leaf].SLN
        PhaseBasedSwitch MinPlantWt: Start=StartGrainFill; End=EndGrainFill
          OnEventFunction OnFlowering: SetEvent=Flowering
            Constant PreEventValue: FixedValue=0
            MultiplyFunction PostEventValue
              DivideFunction
                VariableReference LiveWt: VariableName=Leaf.Live.Wt
                VariableReference Density: VariableName=[Plant].SowingData.Density
              SubtractFunction
                Constant base: FixedValue=1
                Constant RetranslocationFactor: FixedValue=0.15
      GenericOrgan Rachis
        Constant InitialWtFunction: FixedValue=0; Units=g/plant
        Constant InitialNConcFunction: FixedValue=0
        Constant NReallocationFactor: FixedValue=0
        RetranslocateAvailableN
          MaximumFunction RetranslocateFunction
            MinimumFunction
              MultiplyFunction availableDilnN
                DivideFunction
                  MultiplyFunction dltStemNConc
                    AddFunction
                      MultiplyFunction
                        Constant dilnNSlope: FixedValue=0.0062
                        MultiplyFunction stemNConc
                          DivideFunction divide
                            VariableReference nGreen: VariableName=[Rachis].Live.N
                            AddFunction DMToday
                              VariableReference dltDmGreen: VariableName=[Rachis].potentialDMAllocation.Structural
                              VariableReference dmGreen: VariableName=[Rachis].Live.Wt
                          Constant Percentage: FixedValue=100
                      Constant dilnNInt: FixedValue=-0.001
                    VariableReference ThermalTime: VariableName=[Phenology].ThermalTime
                  Constant: FixedValue=100
                AddFunction DMToday
                  VariableReference dltDmGreen: VariableName=[Rachis].potentialDMAllocation.Structural
                  VariableReference dmGreen: VariableName=[Rachis].Live.Wt
              SubtractFunction
                VariableReference NGreen: VariableName=[Rachis].Live.N
                VariableReference StructuralN: VariableName=[Rachis].NDemands.Structural
            Constant Zero: FixedValue=0
          Constant RetranslocateDMFunction: FixedValue=0
        DivideFunction NRetranslocationFactor
          MaximumFunction NRetranslocationAmount: same as Replacements.Sorghum.Rachis.RetranslocateAvailableN.RetranslocateFunction
        Constant SenescenceRate: FixedValue=0; Units=/d
        LinearInterpolationFunction ExpansionStress: XProperty=[Sorghum].Leaf.Fw
          XYPairs: X=[0, 0.6]; Y=[1, 1]
        Constant DetachmentRateFunction: FixedValue=0; Units=/d
        Constant MaintenanceRespirationFunction: FixedValue=0; Units=0-1
        Constant DMConversionEfficiency: FixedValue=1; Units=0-1
        BiomassRemoval BiomassRemovalDefaults: same as Replacements.Sorghum.Grain.BiomassRemovalDefaults
        Constant DMReallocationFactor: FixedValue=0
        Constant DMRetranslocationFactor: FixedValue=0
        Constant RemobilisationCost: FixedValue=0
        Constant CarbonConcentration: FixedValue=0.4
        BiomassDemand DMDemands
          MultiplyFunction Structural
            PhaseLookup DMDemandFunction
              PhaseLookupValue BetweenFIAndFlower: Start=FloralInitiation; End=Flowering
                MultiplyFunction
                  VariableReference DMRemainingAfterLeaf: VariableName=[Leaf].DMRemaining.Value()
                  VariableReference Stem2FlowerFrac: VariableName=[Stem].StemToFlowerFrac.Value()
              PhaseLookupValue BetweenFlagAndFlowering: Start=FlagLeaf; End=Flowering
                MultiplyFunction
                  VariableReference DMFixationSupply: VariableName=[Arbitrator].DM.TotalSupplyFunction.Value
                  VariableReference Stem2FlowerFrac: VariableName=[Stem].StemToFlowerFrac.Value()
            Constant StructuralFraction: FixedValue=1
          Constant Metabolic: FixedValue=0
          Constant Storage: FixedValue=0
        BiomassDemand NDemands
          MaximumFunction Structural
            Constant zero: FixedValue=0
            SubtractFunction
              MultiplyFunction required
                VariableReference MinNconc: VariableName=[Rachis].minimumNconc.Value()
                AddFunction
                  VariableReference dltDmGreen: VariableName=[Rachis].potentialDMAllocation.Structural
                  VariableReference dmGreen: VariableName=[Rachis].Live.Wt
                VariableReference NitrogenDemandSwitch: VariableName=[Rachis].nitrogenDemandSwitch.Value()
              VariableReference nGreen: VariableName=[Rachis].Live.N
          MaximumFunction Metabolic
            Constant zero: FixedValue=0
            SubtractFunction
              MultiplyFunction required
                VariableReference CritNconc: VariableName=[Rachis].criticalNConc.Value()
                AddFunction
                  VariableReference dltDmGreen: VariableName=[Rachis].potentialDMAllocation.Structural
                  VariableReference dmGreen: VariableName=[Rachis].Live.Wt
                VariableReference NitrogenDemandSwitch: VariableName=[Rachis].nitrogenDemandSwitch.Value()
              VariableReference nGreen: VariableName=[Rachis].Live.N
          StorageNDemandFunction Storage
            VariableReference NitrogenDemandSwitch: VariableName=[Rachis].nitrogenDemandSwitch.Value()
            VariableReference MaxNconc: VariableName=[Rachis].maximumNconc.Value()
        Constant MinimumNConc: FixedValue=0.003
        Constant CriticalNConc: FixedValue=0.01
        Constant MaximumNConc: FixedValue=0.008
        PhaseBasedSwitch NitrogenDemandSwitch: Start=Emergence; End=StartGrainFill
      GenericOrgan Stem
        MultiplyFunction InitialWtFunction
          Constant InitialPlantWt: FixedValue=0.1; Units=g/plant
          VariableReference Population: VariableName=[Plant].Population
        Constant initialNConcFunction: FixedValue=0.01
        Constant NReallocationFactor: FixedValue=0
        RetranslocateAvailableN RetranslocateNitrogen
          MaximumFunction RetranslocateFunction
            MinimumFunction
              MultiplyFunction availableDilnN
                DivideFunction
                  MultiplyFunction dltStemNConc
                    AddFunction
                      MultiplyFunction
                        Constant dilnNSlope: FixedValue=0.0062
                        MultiplyFunction stemNConcPct
                          DivideFunction divide
                            VariableReference nGreen: VariableName=[Stem].Live.N
                            AddFunction DMToday
                              VariableReference dltDmGreen: VariableName=[Stem].potentialDMAllocation.Structural
                              VariableReference dmGreen: VariableName=[Stem].Live.Wt
                          Constant Percentage: FixedValue=100
                      Constant dilnNInt: FixedValue=-0.001
                    VariableReference ThermalTime: VariableName=[Phenology].ThermalTime
                  Constant: FixedValue=100
                AddFunction DMToday
                  VariableReference dltDmGreen: VariableName=[Stem].potentialDMAllocation.Structural
                  VariableReference dmGreen: VariableName=[Stem].Live.Wt
              SubtractFunction
                VariableReference NGreen: VariableName=[Stem].Live.N
                MultiplyFunction
                  AddFunction DMToday
                    VariableReference dltDmGreen: VariableName=[Stem].potentialDMAllocation.Structural
                    VariableReference dmGreen: VariableName=[Stem].Live.Wt
                  VariableReference StructuralN: VariableName=[Stem].CriticalNconc.Value
            Constant Zero: FixedValue=0
          MaximumFunction RetranslocateDMFunction
            MultiplyFunction StemWtAvail
              SubtractFunction
                AddFunction DMToday
                  VariableReference dltDmGreen: VariableName=[Stem].potentialDMAllocation.Structural
                  VariableReference dmGreen: VariableName=[Stem].Live.Wt
                MultiplyFunction
                  OnEventFunction PlantMinDM: SetEvent=Flowering
                    Constant PreEventValue: FixedValue=0
                    Constant PostEventValue: FixedValue=0.3
                      MultiplyFunction PlantMinDM
                        DivideFunction dmPlantStem
                          VariableReference dmGreen: VariableName=[Stem].Live.Wt
                          VariableReference density: VariableName=[Plant].SowingData.Density
                        SubtractFunction
                          Constant One: FixedValue=1
                          Constant translocFrac: FixedValue=0.2
                  VariableReference density: VariableName=[Plant].SowingData.Density
              Constant retransRate: FixedValue=0.15
            Constant Zero: FixedValue=0
        DivideFunction NRetranslocationFactor
          MaximumFunction NRetranslocationAmount
            MinimumFunction
              MultiplyFunction availableDilnN: same as Replacements.Sorghum.Stem.RetranslocateNitrogen.RetranslocateFunction.MinimumFunction.availableDilnN
              SubtractFunction
                VariableReference NGreen: VariableName=[Stem].Live.N
                MultiplyFunction
                  AddFunction DMToday
                    VariableReference dltDmGreen: VariableName=[Stem].potentialDMAllocation.Structural
                    VariableReference dmGreen: VariableName=[Stem].Live.Wt
                  VariableReference StructuralN: VariableName=[Stem].MinimumNconc.Value
            Constant Zero: FixedValue=0
          VariableReference dmGreen: VariableName=[Stem].Live.Wt
        DivideFunction DMRetranslocationFactor
          MaximumFunction DMRetranslocationAmount: same as Replacements.Sorghum.Stem.RetranslocateNitrogen.RetranslocateDMFunction
          VariableReference dmGreen: VariableName=[Stem].Live.Wt
        Constant StemToFlowerFrac: FixedValue=0.3
        Constant SenescenceRate: FixedValue=0; Units=/d
        Constant DetachmentRateFunction: FixedValue=0; Units=/d
        Constant MaintenanceRespirationFunction: FixedValue=0; Units=0-1
        Constant DMConversionEfficiency: FixedValue=1; Units=0-1
        BiomassRemoval BiomassRemovalDefaults: same as Replacements.Sorghum.Grain.BiomassRemovalDefaults
        Constant DMReallocationFactor: FixedValue=0
        Constant RemobilisationCost: FixedValue=0
        Constant CarbonConcentration: FixedValue=0.4
        BiomassDemand DMDemands
          MultiplyFunction Structural
            MaximumFunction DMDemandFunction
              SubtractFunction DMDemandFunction
                VariableReference DMSupplyFunction: VariableName=[Leaf].DMSupplyFunction
                VariableReference LeafDemand: VariableName=[Leaf].DMDemand.Structural
                VariableReference RachisDemand: VariableName=[Rachis].DMDemand.Structural
                VariableReference GrainDemand: VariableName=[Grain].DMDemand.Structural
              Constant Zero: FixedValue=0
            Constant StructuralFraction: FixedValue=1
          Constant Metabolic: FixedValue=0
          Constant Storage: FixedValue=0
        BiomassDemand NDemands
          MaximumFunction Structural
            Constant zero: FixedValue=0
            SubtractFunction
              MultiplyFunction required
                VariableReference CriticalNconc: VariableName=[Stem].CriticalNConc
                AddFunction
                  VariableReference dltDmGreen: VariableName=[Stem].potentialDMAllocation.Structural
                  VariableReference dmGreen: VariableName=[Stem].Live.Wt
                VariableReference NitrogenDemandSwitch: VariableName=[Stem].nitrogenDemandSwitch.Value()
              VariableReference nGreen: VariableName=[Stem].Live.N
          MaximumFunction Metabolic
            Constant zero: FixedValue=0
            SubtractFunction
              MultiplyFunction required
                VariableReference MinimumNconc: VariableName=[Stem].MinimumNConc
                AddFunction
                  VariableReference dltDmGreen: VariableName=[Stem].potentialDMAllocation.Structural
                  VariableReference dmGreen: VariableName=[Stem].Live.Wt
                VariableReference NitrogenDemandSwitch: VariableName=[Stem].nitrogenDemandSwitch.Value()
              VariableReference nGreen: VariableName=[Stem].Live.N
              VariableReference structural: VariableName=[Stem].NDemands.Structural
          Constant Storage: FixedValue=0
        LinearInterpolationFunction CriticalNConc: XProperty=[Phenology].Stage
          XYPairs: X=[3, 5, 7, 10]; Y=[0.012, 0.012, 0.005, 0.0015]
        LinearInterpolationFunction MinimumNconc: XProperty=[Phenology].Stage
          XYPairs: X=[3, 5, 7, 10]; Y=[0.055, 0.016, 0.01, 0.005]
        LinearInterpolationFunction MaximumNconc: XProperty=[Phenology].Stage
          XYPairs: X=[3, 5, 7, 10]; Y=[0.055, 0.016, 0.01, 0.005]
        PhaseBasedSwitch NitrogenDemandSwitch: Start=Emergence; End=StartGrainFill
      AddFunction TotalPlantDemand
        VariableReference LeafDemand: VariableName=[Leaf].DMDemands.Structural.DMDemandFunction.Value()
        VariableReference StemDemand: VariableName=[Stem].DMDemands.Structural.DMDemandFunction.Value()
        VariableReference RachisDemand: VariableName=[Rachis].DMDemands.Structural.DMDemandFunction.Value()
        VariableReference GrainDemand: VariableName=[Grain].DMDemands.Structural.DMDemandFunction.Value()
      CompositeBiomass AboveGround: DMDOfStructural=0.6
        Propertys=[[Leaf].Live, [Leaf].Dead, [Stem].Live, [Stem].Dead, [Rachis].Live, [Rachis].Dead, [Grain].Live, [Grain].Dead]
      CompositeBiomass AboveGroundLive: Propertys=[[Leaf].Live, [Stem].Live, [Grain].Live, [Rachis].Live]; DMDOfStructural=0.6
        Memo
          The AboveGroundLive composite biomass object includes the Live pools of all organs occurring above the soil surface to allow output for total dry matter and Nutrient contents, including total structural, non-structural and metabolic pools.
      CompositeBiomass AboveGroundDead: Propertys=[[Leaf].Dead, [Stem].Dead, [Grain].Dead, [Rachis].Dead]; DMDOfStructural=0.6
        Memo
          The AboveGroundDead composite biomass object includes the Dead pools of all organs occurring above the soil surface to allow output for total dry matter and Nutrient contents, including total structural, non-structural and metabolic pools.
      CompositeBiomass BelowGround: Propertys=[[Root].Live, [Root].Dead]; DMDOfStructural=0.6
      CompositeBiomass Total: DMDOfStructural=0.6
        Propertys=[[Leaf].Live, [Leaf].Dead, [Stem].Live, [Stem].Dead, [Root].Live, [Root].Dead, [Rachis].Live, [Rachis].Dead, [Grain].Live, [Grain].Dead]
      CompositeBiomass TotalLive: DMDOfStructural=0.6
        Propertys=[[Leaf].Live, [Stem].Live, [Root].Live, [Rachis].Live, [Grain].Live]
      CompositeBiomass TotalDead: DMDOfStructural=0.6
        Propertys=[[Leaf].Dead, [Stem].Dead, [Root].Dead, [Rachis].Dead, [Grain].Dead]
      CultivarFolder Cultivars
        CultivarFolder Australia
          Cultivar Buster
          Cultivar M35-1: Command=[Phenology].TTEndJuvToInit.FixedValue = 200
          Cultivar CSH13r: Command=[Phenology].TTEndJuvToInit.FixedValue = 220
          Cultivar QL41xQL36: Command=[Phenology].TTEndJuvToInit.FixedValue = 220
          Cultivar ATx623xRTx430: Command=[Phenology].TTEndJuvToInit.FixedValue = 220
          Cultivar QL39xQL36: Command=[Phenology].TTEndJuvToInit.FixedValue = 220
          Cultivar A35xQL36: Command=[Phenology].TTEndJuvToInit.FixedValue = 220
    Report: EventNames=[Clock].DoReport
      VariableNames:
        [Clock].Today
        [Clock].Today.Year as Year
        [Clock].Today.DayOfYear as day_of_year
        [Clock].Today.Date as Date
        [Phenology].ThermalTime.Value() as TT
        [Sorghum].Phenology.DaysAfterSowing as Das
        [Sorghum].Phenology.Stage as Stage
        [Sorghum].Phenology.CurrentStageName
        [Sorghum].Phenology.CurrentPhaseName
        [Sorghum].AboveGround.Wt
        [Sorghum].TotalLive.Wt
        [Sorghum].TotalDead.Wt
        [Sorghum].Total.Wt
        [Sorghum].Root.Live.Wt as RootGreenWt
        [Sorghum].Root.Live.N as RootGrrenN
        [Leaf].Senesced.Wt
        [Leaf].Senesced.N
        [Leaf].Dead.Wt
        [Leaf].Dead.N
        [Sorghum].Leaf.Live.Wt as LeafGreenWt
        [Sorghum].Leaf.Live.N as LeafGreenN
        [Sorghum].Stem.Live.Wt as StemGreenWt
        [Sorghum].Stem.Live.N as StemGreenN
        [Sorghum].Rachis.Live.Wt as RachisGreenWt
        [Sorghum].Rachis.Live.N as RachisGreenN
        [Sorghum].Grain.Live.Wt as GrainGrrenWt
        [Sorghum].Grain.Live.N as GrainGreenN
        [Sorghum].Grain.Live.NConc as GrainGreenNConc
        [Sorghum].Grain.NumberFunction.Value() as GrainNo
        [Sorghum].Grain.Size as GrainSize
        [Sorghum].Structure.MainStemNodeNo as LeafNo
        [Sorghum].Phenology.LeafAppearance1.RemainingLeaves.Value()
        [Sorghum].Phenology.LeafAppearance2.RemainingLeaves.Value()
        [Sorghum].Phenology.LeafAppearance1._RemainingLeaves
        [Sorghum].Phenology.LeafAppearance2._RemainingLeaves
        [Soil].SoilWater.SW
        sum([Soil].SoilWater.ESW) as ESW
        [Sorghum].Phenology.Juvenile.Target.Value()
        sum([Soil].SoilNitrogen.NO3.kgha) as NO3
        sum([Soil].SoilWater.SW) as sw
        [Soil].SoilNitrogen.NO3.kgha
        [Soil].SoilNitrogen.NH4.kgha
        [Sorghum].Leaf.Fw as WaterSD
        [Sorghum].Leaf.Photosynthesis.FW.Value() as RUEStress
        [Phenology].Germinating.Target.Value()
        [Phenology].Emerging.Target.Value()
        [Phenology].Juvenile.Target.Value()
        [Phenology].JuvenileToFloralInit.Target.Value()
        [Phenology].FloralInitToFlagLeaf.Target.Value()
        [Phenology].FlagLeafToFlowering.Target.Value()
        [Phenology].FloweringToGrainFilling.Target.Value()
        [Phenology].GrainFilling.Target.Value()
        [Phenology].Maturing.Target.Value()
        [Phenology].MaturityToHarvestRipe.Target.Value()
        [Phenology].TTFromEmergence.Value()
        [Phenology].TTEmergToFlagLeaf.Value()
        [Structure].FinalLeafNumber.Value()
        [Structure].CurrentLeafNo
        [Structure].FertileTillerNumber
        [Structure].RemainingLeaves
        [Weather].Radn
        [Arbitrator].DM.TotalFixationSupply
        [Arbitrator].N.TotalFixationSupply
        [Arbitrator].N.TotalPlantSupply
        [Arbitrator].N.SupplyDemandRatioN
        [Arbitrator].WDemand
        [Arbitrator].WSupply
        [Arbitrator].WatSupply
        [Arbitrator].WAllocated
        [Arbitrator].NMassFlowSupply
        [Arbitrator].NDiffusionSupply
        [Arbitrator].NDemand
        [Arbitrator].NSupply
        [Arbitrator].SupplyDemandRatioN
        [Arbitrator].N.UptakeSupply
        [Arbitrator].N.Uptake
        [Grain].Live.Wt
        [Grain].Live.N
        [Grain].Size
        [Grain].LiveFWt
        [Grain].NDemand.Total
        [Grain].FinalGrainNum.Value()
        [Grain].DMDemands.Structural.DMDemandFunction.Value()
        [Grain].PotGrainFillRate.Value()
        [Leaf].DMDemands.Structural.DMDemandFunction.Value()
        [Stem].DMDemands.Structural.DMDemandFunction.Value()
        [Rachis].DMDemands.Structural.DMDemandFunction.Value()
        [Leaf].DMRemaining.Value()
        [Leaf].DMSupplyFixation.Value()
        [Leaf].DMSupplyFunction.Value()
        ([Leaf].DMSupplyFixation.Value() - [Leaf].DMSupplyFunction.Value())
        [Leaf].BiomTE.Value()
        [Leaf].Photosynthesis.Value()
        [Leaf].WaterDemandFunction.Value()
        [Arbitrator].WSupply
        [Leaf].WaterAllocation
        [Leaf].DMDemands.Structural.DMDemandFunction.Value()
        [Leaf].SLN.Value()
        [Leaf].BiomTE
        [Leaf].Photosynthesis.Value()
        [Leaf].TotalSupply
        [Leaf].LAI
        [Leaf].Live.N
        [Leaf].LAIFunction
        [Leaf].DMPotentialAllocation.Structural
        [Leaf].NDemand.Total
        [Leaf].NDemand.Structural
        [Leaf].NDemand.Metabolic
        [Leaf].NDemand.Storage
        [Leaf].NDemand.Total
        [Leaf].Allocated.StructuralN
        [Leaf].Allocated.MetabolicN
        [Leaf].Allocated.StorageN
        [Leaf].Allocated.TotalN
        [Leaf].Senesced.Wt
        [Leaf].CoverGreen
        [Leaf].RadIntTot
        [Leaf].WaterDemand
        [Leaf].WaterAllocation
        [Leaf].Photosynthesis
        [Leaf].LeafPartitioningCoefficient.Value()
        [Leaf].BiomTE
        [Leaf].DeltaPotentialTPLA
        [Leaf].DeltaPotentialLAI
        [Leaf].DeltaLAI
        [Leaf].NDemands.Structural
        [Leaf].DMDemands.Total
        [Leaf].dltDmLeafMax
        [Leaf].DMPotentialAllocation.Total
        [Leaf].SLN
        [Leaf].Senesced.Wt
        [Leaf].Senesced.N
        [Stem].Live.Wt
        [Stem].Dead.Wt
        [Stem].Senesced.Wt
        [Stem].Senesced.N
        [Stem].NDemand.Total
        [Stem].NDemand.Structural
        [Stem].NDemand.Metabolic
        [Stem].NDemand.Storage
        [Stem].NDemand.Total
        [Stem].Allocated.StructuralN
        [Stem].Allocated.MetabolicN
        [Stem].Allocated.StorageN
        [Stem].Allocated.TotalN
        [Root].NSupply.Total
        [Rachis].NDemand.Total
        [Leaf].NDemand.Total
        [Root].potentialDMAllocation.Structural
        [Root].NDemand.Structural
        [Root].NDemand.Metabolic
        [Root].NDemand.Storage
        [Root].NDemand.Total
        [Root].Allocated.StructuralN
        [Root].Allocated.MetabolicN
        [Root].Allocated.StorageN
        [Root].Allocated.Total
        [Root].DMDemand.Total
        [Root].DMDemand.Structural
        [Root].Depth
        [Root].NTakenUp
        [Root].NUptake
        [Root].Senesced.Wt
        [Root].Senesced.N
        [Root].Dead.Wt
        [Root].Senesced.StructuralWt
        [Root].Detached.N
        [Root].Detached.Wt
        [Root].PlantZone.NitUptake
        [Root].PlantZone.NUptakeSupply
        [Sorghum].TotalLive.N
        [Arbitrator].DM.StructuralAllocation[0]
        [Arbitrator].DM.StructuralDemand[0]
        [Arbitrator].DM.MetabolicAllocation[0]
        [Arbitrator].DM.MetabolicDemand[0]
        [Arbitrator].DM.TotalAllocation[0]
        [Arbitrator].DM.TotalPlantDemand
        [Arbitrator].N.StructuralDemand[0]
        [Arbitrator].N.MetabolicDemand[0]
        [Arbitrator].N.StorageDemand[0]
        [Arbitrator].N.StructuralAllocation[0]
        [Arbitrator].N.MetabolicAllocation[0]
        [Arbitrator].N.StorageAllocation[0]
        [Arbitrator].N.TotalPlantDemand
        [Arbitrator].N.TotalAllocation[0]
        [Arbitrator].N.Allocated
        [Arbitrator].DM.NotAllocated
        [Root].NDemand.Structural + [Stem].NDemand.Structural as StructuralDemandB4Rachis
        [Root].PlantZone.DeltaNO3
        ([Arbitrator].N.TotalPlantDemand - [Leaf].NDemand.Structural) as PlantDemand
        TotalDead.Wt
        TotalDead.N
  DataStore
    ExcelInput Apsim79HE1BusterNoTillers: FileName=BusterNoTillers.xlsx; SheetNames=[Apsim79HE1BusterNoTillers]
    ExcelInput HE1Culms: FileName=HE1Culms.xlsx; SheetNames=[HE1Culms]
  Folder SomeStress
    Simulation Sorghum_SomeStress
      Clock: StartDate=1997-01-08; EndDate=1997-06-04
      Summary summaryfile
      Weather: FileName=.\Met\HE1.met
      Zone paddock: Area=1; Slope=0
        Soil HRS: SoilType=HMM; Site=HRS; NearestTown=Unknown; Region=SE Queensland; NaturalVegetation=Unknown; Latitude=0; Longitude=0
          Water
            Thickness  BD    AirDry  LL15   DUL   SAT
            100        1.34  0.08    0.226  0.42  0.45
            100        1.34  0.19    0.226  0.42  0.45
            200        1.33  0.23    0.258  0.46  0.48
            200        1.38  0.26    0.27   0.46  0.47
            200        1.4   0.26    0.268  0.43  0.45
            200        1.55  0.28    0.304  0.4   0.41
            200        1.59  0.25    0.335  0.37  0.38
            200        1.63  0.28    0.33   0.33  0.37
            200        1.66  0.3     0.32   0.32  0.37
            200        1.68  0.31    0.33   0.33  0.36
            SoilCrop SorghumSoil
              LL=[0.226, 0.226, 0.258, 0.27, 0.268, 0.304, 0.335, 0.33, 0.32, 0.33]
              KL=[0.07, 0.07, 0.07, 0.07, 0.06, 0.06, 0.06, 0.05, 0.05, 0.04]
              XF=[1, 1, 1, 1, 1, 1, 1, 1, 1, 1]
          SoilWater: SummerDate=1-Nov; SummerU=1.5; SummerCona=6.5; WinterDate=1-Apr; WinterU=1.5; WinterCona=6.5; DiffusConst=40; DiffusSlope=16; Salb=0.2; CN2Bare=85; CNRed=20; CNCov=0.8; max_pond=0; Thickness=[100, 100, 200, 200, 200, 200, 200, 200, 200, 200]; SWCON=[0.3, 0.3, 0.3, 0.3, 0.3, 0.3, 0.3, 0.3, 0.3, 0.3]; ResidueInterception=0
          SoilNitrogen: fom_types=[default, manure, mucuna, lablab, shemp, stable]; fract_carb=[0.2, 0.3, 0.54, 0.57, 0.45, 0]; fract_cell=[0.7, 0.3, 0.37, 0.37, 0.47, 0.1]; fract_lign=[0.1, 0.4, 0.09, 0.06, 0.08, 0.9]
            SoilNitrogenNO3 NO3
            SoilNitrogenNH4 NH4
            SoilNitrogenUrea Urea
            SoilNitrogenPlantAvailableNO3 PlantAvailableNO3
            SoilNitrogenPlantAvailableNH4 PlantAvailableNH4
          SoilOrganicMatter: RootCN=50; EnrACoeff=7.4; EnrBCoeff=0.2; OCUnits=Total
            Thickness  OC    SoilCN  FBiom  FInert  RootWt
            100        1.19  12.5    0.05   0.45    260.587
            100        0.59  12.5    0.02   0.6     220.582
            200        0.45  12.5    0.01   0.75    158.054
            200        0.3   12.5    0.01   0.9     113.251
            200        0.2   12.5    0.01   0.9     81.1478
            200        0.16  12.5    0.01   0.9     58.1449
            200        0.17  12.5    0.01   0.9     41.6626
            200        0.17  12.5    0.05   0.9     29.8526
            200        0.17  12.5    0.02   0.9     21.3903
            200        0.17  12.5    0.01   0.9     15.3268
          Analysis: Thickness=[100, 100, 200, 200, 200, 200, 200, 200, 200, 200]; PH=[6.3, 6.4, 6.5, 6.6, 6.6, 6.5, 6.5, 6.5, 6.5, 6.5]; PHUnits=Water; BoronUnits=0
          Sample Initial Water: Thickness=[100, 100, 200, 200, 200, 200, 200, 200, 200, 200]; NO3Units=ppm; NH4Units=ppm; SWUnits=Volumetric; OCUnits=Total; PHUnits=Water
            SW=[0.235, 0.252, 0.27, 0.3, 0.268, 0.304, 0.335, 0.33, 0.32, 0.33]
          Sample Initial Nitrogen: NO3Units=kg/ha; NH4Units=ppm; SWUnits=Volumetric; OCUnits=Total; PHUnits=Water
            Thickness  NO3       NH4
            100        13.936    0.1
            100        2.18822   0.1
            200        3.27978   0.1
            200        2.484     0.1
            200        3.08      0.1
            200        4.5477    0.1
            200        11.55294  0.1
            200        18.47442  0.1
            200        19.256    0.1
            200        24.41712  0.1
          CERESSoilTemperature
        SurfaceOrganicMatter: InitialResidueName=wheat_stubble; InitialResidueType=wheat; InitialResidueMass=0; InitialStandingFraction=0; InitialCPR=0; InitialCNR=80; FractionFaecesAdded=0.5
        Folder Manager folder
          Manager Harvesting
            TotalSupply = 0
```csharp
using System;
using Models.Core;
using System.Collections.Generic;
using System.Text;
using Models.Soils;
using Models.PMF;
using Models;
using System.Xml.Serialization;
using APSIM.Shared.Utilities;

namespace Models
{
    [Serializable] 
    public class Script : Model
    {
        [Link] Plant Sorghum;
        [Link] Zone zone;

		[Description("TotalSupply")]
        public double TotalSupply { get; set; }
   
        
        [EventSubscribe("Commencing")]

        private void OnSimulationCommencing(object sender, EventArgs e)
            {
            }


        [EventSubscribe("DoManagement")]
        private void OnDoManagement(object sender, EventArgs e)
        {
            if (Sorghum.Phenology.CurrentPhaseName == "ReadyForHarvesting")
            {
                Sorghum.Harvest();
                Sorghum.EndCrop();
            }
        }

        [EventSubscribe("DoManagementCalculations")]
        private void OnDoManagementCalculations(object sender, EventArgs e)
        {

        }
    }
}
```
          Manager Sowing
            date = 9-jan
            crop = Sorghum
            density = 10
            depth = 30
            cultivar = Buster
            row_spacing = 0.5
            RowConfiguration = solid
            ftn = 0
```csharp
using System;
using Models.Core;
using Models.PMF;
using Models.PMF;
using Models.Utilities;
using APSIM.Shared.Utilities;
namespace Models
{
    [Serializable]
    [System.Xml.Serialization.XmlInclude(typeof(Model))]
    public class Script : Model
    {
        [Link] Clock Clock;
        [Link] Plant Sorghum;

        
        [Description("Enter sowing date(d - mmm) : ")]

        public string date { get; set; }

        [Description("Enter name of crop to sow : ")]
        public string crop { get; set; }

        [Description("Enter sowing density  (plants/m2) : ")]
        public double density { get; set; }

        [Description("Enter sowing depth  (mm) : ")]
        public double depth { get; set; }

        [Description("Enter cultivar : ")]
        [Display(Type=DisplayType.CultivarName)]
        public string cultivar { get; set; }

        [Description("Enter row spacing (m) : ")]
        public double row_spacing { get; set; }

        [Description("Enter skip row configuration : ")]
        public RowConfigurationType RowConfiguration { get; set; }

        [Description("Enter Fertile Tiller No. : ")]
        public double ftn { get; set; }

        public enum RowConfigurationType
        {
            solid,
            singleskip,
            doubleskip
        }

        [EventSubscribe("DoManagement")]
        private void OnDoManagement(object sender, EventArgs e)
        {
            if (DateUtilities.WithinDates(date, Clock.Today, date) && !Sorghum.IsAlive)
            {
                Sorghum.Sow(population: density, cultivar: cultivar, depth: depth, rowSpacing: row_spacing, budNumber: ftn, rowConfig: ((double)RowConfiguration) + 1);
            }

            /*
                
            if (paddock_is_fallow() = 1 and today = date('[date]')) then
              [crop] sow plants =[density], sowing_depth = [depth], cultivar = [cultivar], row_spacing = [row_spacing], skip = [RowConfiguration], tiller_no_fertile = [ftn] ()
            endif
            if (paddock_is_fallow() = 0) then
               outputfile do_output
            endif
          
            */
        }
    }
}
```
        Report: EventNames=[Clock].EndOfDay
          VariableNames:
            Leaf.LAI
            [HRS].SoilNitrogen.NO3.kgha
            [HRS].SoilNitrogen.dlt_no3_net
        Fertiliser
        Plant Sorghum: IsEnding=false; DaysAfterEnding=0
        Irrigation
        Operations
          1997-01-09  [Irrigation].Apply(52);
          1997-01-16  [Irrigation].Apply(36);
          1997-01-21  [Irrigation].Apply(18);
          1997-01-29  [Irrigation].Apply(20);
          1997-02-07  [Irrigation].Apply(14);
          1997-03-13  [Irrigation].Apply(30);
          1997-03-21  [Irrigation].Apply(45);
          1997-04-10  [Irrigation].Apply(27);
          1997-04-17  [Irrigation].Apply(42);
          1997-05-02  [Irrigation].Apply(27);
          1996-12-20  [Fertiliser].Apply(33, Fertiliser.Types.NO3N, 50);
          1996-12-23  [Fertiliser].Apply(0, Fertiliser.Types.NO3N, 50);
          1996-12-23  [Fertiliser].Apply(119, Fertiliser.Types.NO3N, 50);
          1997-02-12  [Fertiliser].Apply(59, Fertiliser.Types.NO3N, 50);
          1997-03-21  [Fertiliser].Apply(59, Fertiliser.Types.NO3N, 50);
      SoilArbitrator
  Folder NoStress
    Simulation Sorghum_NoStress
      Clock: StartDate=1997-01-08; EndDate=1997-06-04
      Summary summaryfile
      Weather: FileName=.\Met\HE1.met
      Zone paddock: Area=1; Slope=0
        Soil HRS: SoilType=HMM; Site=HRS; NearestTown=Unknown; Region=SE Queensland; NaturalVegetation=Unknown; Latitude=0; Longitude=0
          Water: same as SomeStress.Sorghum_SomeStress.paddock.HRS.Water
          SoilWater: same as SomeStress.Sorghum_SomeStress.paddock.HRS.SoilWater
          SoilNitrogen: same as SomeStress.Sorghum_SomeStress.paddock.HRS.SoilNitrogen
          SoilOrganicMatter: same as SomeStress.Sorghum_SomeStress.paddock.HRS.SoilOrganicMatter
          Analysis: same as SomeStress.Sorghum_SomeStress.paddock.HRS.Analysis
          Sample Initial Water: Thickness=[100, 100, 200, 200, 200, 200, 200, 200, 200, 200]; NO3Units=ppm; NH4Units=ppm; SWUnits=Volumetric; OCUnits=Total; PHUnits=Water
            SW=[0.235, 0.252, 0.27, 0.3, 0.268, 0.304, 0.335, 0.33, 0.32, 0.33]
          Sample Initial Nitrogen: NO3Units=kg/ha; NH4Units=ppm; SWUnits=Volumetric; OCUnits=Total; PHUnits=Water
            Thickness  NO3       NH4
            100        13.936    0.1
            100        2.18822   0.1
            200        3.27978   0.1
            200        2.484     0.1
            200        3.08      0.1
            200        4.5477    0.1
            200        11.5529   0.1
            200        18.47442  0.1
            200        19.256    0.1
            200        24.41712  0.1
          CERESSoilTemperature
        SurfaceOrganicMatter: InitialResidueName=wheat_stubble; InitialResidueType=wheat; InitialResidueMass=0; InitialStandingFraction=0; InitialCPR=0; InitialCNR=80; FractionFaecesAdded=0.5
        Folder Manager folder: same as SomeStress.Sorghum_SomeStress.paddock.Manager folder
        Report: EventNames=[Clock].EndOfDay
          VariableNames:
            Leaf.LAI
            [HRS].SoilNitrogen.NO3.kgha
            [HRS].SoilNitrogen.dlt_no3_net
        Fertiliser
        Plant Sorghum: IsEnding=false; DaysAfterEnding=0
        Irrigation
        Operations
          1997-01-09  [Irrigation].Apply(100);
          1997-01-16  [Irrigation].Apply(36);
          1997-01-21  [Irrigation].Apply(100);
          1997-01-29  [Irrigation].Apply(20);
          1997-02-07  [Irrigation].Apply(14);
          1997-03-13  [Irrigation].Apply(100);
          1997-03-21  [Irrigation].Apply(45);
          1997-04-10  [Irrigation].Apply(27);
          1997-04-17  [Irrigation].Apply(100);
          1997-05-02  [Irrigation].Apply(27);
          1996-12-20  [Fertiliser].Apply(33, Fertiliser.Types.NO3N, 50);
          1996-12-23  [Fertiliser].Apply(150, Fertiliser.Types.NO3N, 50);
          1996-12-23  [Fertiliser].Apply(119, Fertiliser.Types.NO3N, 50);
          1997-02-12  [Fertiliser].Apply(59, Fertiliser.Types.NO3N, 50);
          1997-03-21  [Fertiliser].Apply(59, Fertiliser.Types.NO3N, 50);
      SoilArbitrator
  Folder NStress
    Simulation Sorghum_NStress
      Clock: StartDate=1997-01-08; EndDate=1997-06-04
      Summary summaryfile
      Weather: FileName=.\Met\HE1.met
      Zone paddock: Area=1; Slope=0
        Soil HRS: same as SomeStress.Sorghum_SomeStress.paddock.HRS
        SurfaceOrganicMatter: InitialResidueName=wheat_stubble; InitialResidueType=wheat; InitialResidueMass=0; InitialStandingFraction=0; InitialCPR=0; InitialCNR=80; FractionFaecesAdded=0.5
        Folder Manager folder: same as SomeStress.Sorghum_SomeStress.paddock.Manager folder
        Report: EventNames=[Clock].EndOfDay
          VariableNames:
            Leaf.LAI
            [HRS].SoilNitrogen.NO3.kgha
            [HRS].SoilNitrogen.dlt_no3_net
        Fertiliser
        Plant Sorghum: IsEnding=false; DaysAfterEnding=0
        Irrigation
        Operations
          1997-01-09  [Irrigation].Apply(100);
          1997-01-16  [Irrigation].Apply(36);
          1997-01-21  [Irrigation].Apply(100);
          1997-01-29  [Irrigation].Apply(20);
          1997-02-07  [Irrigation].Apply(14);
          1997-03-13  [Irrigation].Apply(100);
          1997-03-21  [Irrigation].Apply(45);
          1997-04-10  [Irrigation].Apply(27);
          1997-04-17  [Irrigation].Apply(100);
          1997-05-02  [Irrigation].Apply(27);
          1996-12-20  [Fertiliser].Apply(0, Fertiliser.Types.NO3N, 50);
          1996-12-23  [Fertiliser].Apply(0, Fertiliser.Types.NO3N, 50);
          1996-12-23  [Fertiliser].Apply(0, Fertiliser.Types.NO3N, 50);
          1997-02-12  [Fertiliser].Apply(0, Fertiliser.Types.NO3N, 50);
          1997-03-21  [Fertiliser].Apply(0, Fertiliser.Types.NO3N, 50);
      SoilArbitrator
  Folder WaterStress
    Simulation Sorghum_WaterStress
      Clock: StartDate=1997-01-08; EndDate=1997-06-04
      Summary summaryfile
      Weather: FileName=.\Met\HE1.met
      Zone paddock: Area=1; Slope=0
        Soil HRS: same as SomeStress.Sorghum_SomeStress.paddock.HRS
        SurfaceOrganicMatter: InitialResidueName=wheat_stubble; InitialResidueType=wheat; InitialResidueMass=0; InitialStandingFraction=0; InitialCPR=0; InitialCNR=80; FractionFaecesAdded=0.5
        Folder Manager folder: same as SomeStress.Sorghum_SomeStress.paddock.Manager folder
        Report: EventNames=[Clock].EndOfDay
          VariableNames:
            Leaf.LAI
            [HRS].SoilNitrogen.NO3.kgha
            [HRS].SoilNitrogen.dlt_no3_net
        Fertiliser
        Plant Sorghum: IsEnding=false; DaysAfterEnding=0
        Irrigation
        Operations
          1997-01-09  [Irrigation].Apply(52);
          1997-01-16  [Irrigation].Apply(0);
          1997-01-21  [Irrigation].Apply(0);
          1997-01-29  [Irrigation].Apply(0);
          1997-02-07  [Irrigation].Apply(0);
          1997-03-13  [Irrigation].Apply(0);
          1997-03-21  [Irrigation].Apply(0);
          1997-04-10  [Irrigation].Apply(0);
          1997-04-17  [Irrigation].Apply(0);
          1997-05-02  [Irrigation].Apply(0);
          1996-12-20  [Fertiliser].Apply(33, Fertiliser.Types.NO3N, 50);
          1996-12-23  [Fertiliser].Apply(150, Fertiliser.Types.NO3N, 50);
          1996-12-23  [Fertiliser].Apply(119, Fertiliser.Types.NO3N, 50);
          1997-02-12  [Fertiliser].Apply(59, Fertiliser.Types.NO3N, 50);
          1997-03-21  [Fertiliser].Apply(59, Fertiliser.Types.NO3N, 50);
      SoilArbitrator
  Folder Fallow
    Simulation Sorghum_Fallow
      Clock: StartDate=1997-01-08; EndDate=1997-06-04
      Summary summaryfile
      Weather: FileName=.\Met\HE1.met
      Zone paddock: Area=1; Slope=0
        Soil HRS: same as SomeStress.Sorghum_SomeStress.paddock.HRS
        SurfaceOrganicMatter: InitialResidueName=wheat_stubble; InitialResidueType=wheat; InitialResidueMass=0; InitialStandingFraction=0; InitialCPR=0; InitialCNR=80; FractionFaecesAdded=0.5
        Folder Manager folder
        Report: EventNames=[Clock].EndOfDay
          VariableNames:
            Leaf.LAI
            [HRS].SoilNitrogen.NO3.kgha
            [HRS].SoilNitrogen.dlt_no3_net
        Fertiliser
        Plant Sorghum: IsEnding=false; DaysAfterEnding=0
        Irrigation
        Operations: same as WaterStress.Sorghum_WaterStress.paddock.operations
      SoilArbitrator
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